// SBML level 2 version 4
// dcterms:bibliographicCitation: http://identifiers.org/pubmed/12914904

function function_removed_from_oscillatory_system_1(Cdk2_CycE, kon, phi)
  kon*phi*Cdk2_CycE;
end

function function_removed_from_oscillatory_system_2(PCdk2_CycE, kon, phi)
  kon*phi*PCdk2_CycE;
end

function Function_for_degradation_of_Xic_Cyc_Cdk_1(Deg_a, Xic_PCdk2_CycErem, kedeg)
  kedeg*Xic_PCdk2_CycErem*Deg_a;
end

function Function_for_degradation_of_Xic_Cyc_Cdk_2(Deg_a, Xic_Cdk2_CycErem, kedeg)
  kedeg*Xic_Cdk2_CycErem*Deg_a;
end

function function_Hill_Cdk2_CycE_removal_1(Heav, kdact)
  kdact*Heav;
end

function Function_phosphorylation_with_Wee1_1(Wee1_a, Xic_Cdk2_CycE, kwee)
  kwee*Wee1_a*Xic_Cdk2_CycE;
end

function Function_phosphorylation_with_Wee1_2(Cdk2_CycE, Wee1_a, kwee)
  kwee*Wee1_a*Cdk2_CycE;
end

function Function_for_Kin_a_1(Cdk2_CycE, Jiact, Jiinact, Kin_a, kiact, kiinact)
  kiact*(1 - Kin_a)/(Jiact + 1 - Kin_a) - kiinact*Cdk2_CycE*Kin_a/(Jiinact + Kin_a);
end

function Function_for_degradation_of_Xic_Cyc_Cdk_3(Cdk2_CycErem, Deg_a, kedeg)
  kedeg*Cdk2_CycErem*Deg_a;
end

function Function_for_degradation_of_Xic_Cyc_Cdk_4(Deg_a, PCdk2_CycErem, kedeg)
  kedeg*PCdk2_CycErem*Deg_a;
end

function function_removed_from_oscillatory_system_3(Xic_PCdk2_CycE, kon, phi)
  kon*phi*Xic_PCdk2_CycE;
end

function function_removed_from_oscillatory_system_4(Xic_Cdk2_CycE, kon, phi)
  kon*phi*Xic_Cdk2_CycE;
end

function Function_for_Wee1_a_1(Jwact, Jwinact, Kin_a, Wee1_a, Wee1_total, kwact, kwinact)
  kwact*(Wee1_total - Wee1_a)/(Jwact + Wee1_total - Wee1_a) - kwinact*Kin_a*Wee1_a/(Jwinact + Wee1_a);
end

model Cell_Cyle_Model()
  // Ciliberto2003 - CyclinE / Cdk2 timer in the cell cycle of Xenopus laevis embryo
  // This model is described in the article:
  // A kinetic model of the cyclin E/Cdk2 developmental timer in Xenopus laevis embryos.
  // Ciliberto A, Petrus MJ, Tyson JJ, Sible JC.
  // Biophys. Chem. 2003 Jul; 104(3): 573-589
  // Abstract:
  // Early cell cycles of Xenopus laevis embryos are characterized by rapid oscillations in the activity of two cyclin-dependent kinases. Cdk1 activity peaks at mitosis, driven by periodic degradation of cyclins A and B. In contrast, Cdk2 activity oscillates twice per cell cycle, despite a constant level of its partner, cyclin E. Cyclin E degrades at a fixed time after fertilization, normally corresponding to the midblastula transition. Based on published data and new experiments, we constructed a mathematical model in which: (1) oscillations in Cdk2 activity depend upon changes in phosphorylation, (2) Cdk2 participates in a negative feedback loop with the inhibitory kinase Wee1; (3) cyclin E is cooperatively removed from the oscillatory system; and (4) removed cyclin E is degraded by a pathway activated by cyclin E/Cdk2 itself. The model's predictions about embryos injected with Xic1, a stoichiometric inhibitor of cyclin E/Cdk2, were experimentally validated.
  // This model is hosted on BioModels Database and identified by: BIOMD0000000697.
  // To cite BioModels Database, please use: Chelliah V et al. BioModels: ten-year anniversary. Nucl. Acids Res. 2015, 43(Database issue):D542-8.
  // To the extent possible under law, all copyright and related or neighbouring rights to this encoded model have been dedicated to the public domain worldwide. Please refer to CC0 Public Domain Dedication for more information.
  // biomodels.db:MODEL0913242281
  // biomodels.db:BIOMD0000000697
  // isDescribedBy pubmed:12914904
  // hasPart GO:0051726
  // occursIn BTO:0000379
  // hasProperty mamo:MAMO_0000046

  // Compartments:
  compartment compartment = 1; compartment is "embryo";  // isVersionOf BTO:0000379

  // Species:
  species PCdk2_CycE in compartment = 0.94;  // hasPart uniprot:P50756; isVersionOf GO:0097134; hasPart uniprot:P23437
  species Cdk2_CycE in compartment = 0.06;  // hasPart uniprot:P50756; isVersionOf GO:0097134; hasPart uniprot:P23437
  species Wee1_a in compartment = 1.02;  // hasVersion uniprot:Q8QGV2; hasProperty pato:PATO_0002354
  species $Wee1_total in compartment = 8;  // hasVersion uniprot:Q8QGV2
  species Cdk2_CycErem in compartment = 0;  // hasPart uniprot:P23437; isVersionOf GO:0097134; hasProperty PATO:0002355; hasPart uniprot:P50756
  species PCdk2_CycErem in compartment = 0;  // hasPart uniprot:P50756; isVersionOf GO:0097134; hasProperty PATO:0002355; hasPart uniprot:P23437
  species Deg_a in compartment = 0; Deg_a is "Deg_CycE";  // isVersionOf uniprot:P50756; hasProperty ncit:C18104
  species Xic in compartment = 3;  // isHomologTo ncbiprotein:NP_001108275.1
  species Xic_Cdk2_CycE in compartment = 0;  // hasPart uniprot:P50756; isVersionOf GO:0032991; hasPart uniprot:P23437; hasPart ncbiprotein:NP_001108275.1
  species Xic_PCdk2_CycE in compartment = 0;  // hasPart uniprot:P50756; isVersionOf GO:0032991; hasProperty PATO:0002220; hasPart uniprot:P23437
  species Xic_Cdk2_CycErem in compartment = 0;  // hasPart ncbiprotein:NP_001108275.1; isVersionOf GO:0032991; hasProperty PATO:0002355; hasPart uniprot:P23437
  species Xic_PCdk2_CycErem in compartment = 0;  // hasPart uniprot:P23437; isVersionOf GO:0032991; hasProperty PATO:0002220; hasPart uniprot:P50756
  species Xicrem in compartment = 0;  // isHomologTo ncbiprotein:NP_001108275.1; hasProperty PATO:0002355
  species $Cyc_total in compartment;  // isVersionOf uniprot:P50756
  species $Xic_total in compartment;  // isHomologTo ncbiprotein:NP_001108275.1
  species Kin_a in compartment = 0.6;  // isVersionOf ncit:C28597

  // Parameters:
  Jwact = 0.01;
  Jwinact = 0.01 unit_0;
  kwact = 0.75 unit_1;
  kwinact = 1.5 unit_1;
  Jiact = 0.01;
  Jiinact = 0.01;
  kiact = 0.15 unit_1;
  kiinact = 0.6 unit_1;
  Heav has unit_0;
  kdact = 0.023 unit_1;
  theta = 0.3;
  kwee = 1.5 unit_1;
  k25A = 0.1 unit_1;
  kon = 0.02 unit_1;
  koff = 0.0001 unit_1;
  kassoc = 0.1 unit_1;
  kdissoc = 0.001 unit_1;
  kedeg = 0.017 unit_1;
  kxdeg = 0.01 unit_1;
  phi has unit_0;
  epsilon = 0.001;
  pool has unit_0;
  n = 4;
  L = 0.4;

  // Assignment rules:
  Cyc_total := Xic_PCdk2_CycE + Xic_Cdk2_CycE + Xic_PCdk2_CycErem + Xic_Cdk2_CycErem + PCdk2_CycErem + Cdk2_CycErem + Cdk2_CycE + PCdk2_CycE;
  Xic_total := (Xic + Xic_PCdk2_CycE + Xic_Cdk2_CycE + Xic_PCdk2_CycErem + Xic_Cdk2_CycErem + Xicrem)/3;
  pool := Cdk2_CycErem + PCdk2_CycErem + Xic_Cdk2_CycErem + Xic_PCdk2_CycErem;
  phi := (epsilon + pool^n)/(L^n + pool^n);
  x := Cdk2_CycErem - theta;
  Heav := piecewise(0, x < 0, 1);

  // Reactions:
  Xic_Cdk2_CycE_association: Xic + Cdk2_CycE => Xic_Cdk2_CycE; compartment*kassoc*Xic*Cdk2_CycE;
  Xic_Cdk2_CycErem_association: Xic + Cdk2_CycErem => Xic_Cdk2_CycErem; compartment*kassoc*Xic*Cdk2_CycErem;
  Xic_Cdk2_CycE_dissociation: Xic_Cdk2_CycE => Xic + Cdk2_CycE; compartment*kdissoc*Xic_Cdk2_CycE;
  Xic_Cdk2_CycErem_dissociation: Xic_Cdk2_CycErem => Xic + Cdk2_CycErem; compartment*kdissoc*Xic_Cdk2_CycErem;
  Cdk2_CycErem_to_not_rem: Cdk2_CycErem => Cdk2_CycE; compartment*koff*Cdk2_CycErem;
  PCdk2_CycE_to_not_rem: PCdk2_CycErem => PCdk2_CycE; compartment*koff*PCdk2_CycErem;
  Cdk2_CycE_to_rem: Cdk2_CycE => Cdk2_CycErem; compartment*function_removed_from_oscillatory_system_1(Cdk2_CycE, kon, phi);
  PCdk2_CycE_to_rem: PCdk2_CycE => PCdk2_CycErem; compartment*function_removed_from_oscillatory_system_2(PCdk2_CycE, kon, phi);
  X_degadation: Xic_Cdk2_CycErem => Cdk2_CycErem; compartment*kxdeg*Xic_Cdk2_CycErem;
  X_degradation_phosphorylated_complex: Xic_PCdk2_CycErem => PCdk2_CycErem; compartment*kxdeg*Xic_PCdk2_CycErem;
  Degradation_XicPCdk2_CycErem: Xic_PCdk2_CycErem => Xicrem; compartment*Function_for_degradation_of_Xic_Cyc_Cdk_1(Deg_a, Xic_PCdk2_CycErem, kedeg);  // modifiers: Deg_a
  Degradation_XicCdk2_CycErem: Xic_Cdk2_CycErem => Xicrem; compartment*Function_for_degradation_of_Xic_Cyc_Cdk_2(Deg_a, Xic_Cdk2_CycErem, kedeg);  // modifiers: Deg_a
  Dephos_Xic_PCdk2_CycE: Xic_PCdk2_CycE => Xic_Cdk2_CycE; compartment*k25A*Xic_PCdk2_CycE;
  Dephos_PCdk2_CycE: PCdk2_CycE => Cdk2_CycE; compartment*k25A*PCdk2_CycE;
  Degradation_increase: => Deg_a; compartment*function_Hill_Cdk2_CycE_removal_1(Heav, kdact);
  Phos_Xic_PCdk2_CycE: Xic_Cdk2_CycE => Xic_PCdk2_CycE; compartment*Function_phosphorylation_with_Wee1_1(Wee1_a, Xic_Cdk2_CycE, kwee);  // modifiers: Wee1_a
  Phos_PCdk2_CycE: Cdk2_CycE => PCdk2_CycE; compartment*Function_phosphorylation_with_Wee1_2(Cdk2_CycE, Wee1_a, kwee);  // modifiers: Wee1_a
  Kinase__regulation: Cdk2_CycE => Kin_a + Cdk2_CycE; compartment*Function_for_Kin_a_1(Cdk2_CycE, Jiact, Jiinact, Kin_a, kiact, kiinact);
  Xic_PCdk2_CycE_association: Xic + PCdk2_CycE => Xic_PCdk2_CycE; compartment*kassoc*Xic*PCdk2_CycE;
  Xic_PCdk2_CycErem_association: Xic + PCdk2_CycErem => Xic_PCdk2_CycErem; compartment*kassoc*Xic*PCdk2_CycErem;
  Xic_PCdk2_CycE_dissociation: Xic_PCdk2_CycE => Xic + PCdk2_CycE; compartment*kdissoc*Xic_PCdk2_CycE;
  Xic_PCdk2_CycErem_dissociation: Xic_PCdk2_CycErem => Xic + PCdk2_CycErem; compartment*kdissoc*Xic_PCdk2_CycErem;
  Degradation_Cdk2_CycErem: Cdk2_CycErem => ; compartment*Function_for_degradation_of_Xic_Cyc_Cdk_3(Cdk2_CycErem, Deg_a, kedeg);  // modifiers: Deg_a
  Degradation_PCdk2_CycErem: PCdk2_CycErem => ; compartment*Function_for_degradation_of_Xic_Cyc_Cdk_4(Deg_a, PCdk2_CycErem, kedeg);  // modifiers: Deg_a
  Xicrem_degradation: Xicrem => ; compartment*kxdeg*Xicrem;
  Xic_PCdk2_CycErem_to_not_rem: Xic_PCdk2_CycErem => Xic_PCdk2_CycE; compartment*koff*Xic_PCdk2_CycErem;
  Xic_Cdk2_CycErem_to_not_rem: Xic_Cdk2_CycErem => Xic_Cdk2_CycE; compartment*koff*Xic_Cdk2_CycErem;
  Xic_PCdk2_CycE_to_rem: Xic_PCdk2_CycE => Xic_PCdk2_CycErem; compartment*function_removed_from_oscillatory_system_3(Xic_PCdk2_CycE, kon, phi);
  Xic_Cdk2_CycE_to_rem: Xic_Cdk2_CycE => Xic_Cdk2_CycErem; compartment*function_removed_from_oscillatory_system_4(Xic_Cdk2_CycE, kon, phi);
  Wee1_regulation: => Wee1_a; compartment*Function_for_Wee1_a_1(Jwact, Jwinact, Kin_a, Wee1_a, Wee1_total, kwact, kwinact);  // modifiers: Kin_a, Wee1_total; isVersionOf GO:0065007

  // Unit definitions:
  unit volume = 1e-3 litre;
  unit time = 60 second;
  unit substance = 1e-3 mole;
  unit unit_0 = dimensionless^0; unit_0 is "1";
  unit unit_1 = 1 / second; unit_1 is "1/s";
end
