// SBML level 2 version 3

model ExtendedGeneExpressionModel()

  // Compartments:
  compartment nucleus = 1;
  compartment cytoplasm = 1;

  // Species:
  species $GeneA in nucleus = 1000/nucleus;
  species $GeneB in nucleus = 800/nucleus;
  species mRNA_A in nucleus = 0;
  species mRNA_B in nucleus = 0;
  species ProteinA in cytoplasm = 0;
  species ProteinB in cytoplasm = 0;
  species ProteinA_nuc in nucleus = 0;

  // Parameters:
  k_transcription_A = 2.5;
  k_transcription_B = 3;
  k_translation_A = 20;
  k_translation_B = 18;
  k_transport_A = 5;
  k_deg_mRNA = 0.5;
  k_deg_protein = 0.2;

  // Reactions:
  TranscriptionA: => mRNA_A; k_transcription_A;
  TranscriptionB: => mRNA_B; k_transcription_B;
  TranslationA: mRNA_A => ProteinA; k_translation_A*mRNA_A^1;
  TranslationB: mRNA_B => ProteinB; k_translation_B*mRNA_B^1;
  TransportProteinA: ProteinA => ProteinA_nuc; k_transport_A*ProteinA^1;
  Degradation_mRNA_A: mRNA_A => ; k_deg_mRNA*mRNA_A^1;
  Degradation_mRNA_B: mRNA_B => ; k_deg_mRNA*mRNA_B^1;
  Degradation_ProteinA: ProteinA => ; k_deg_protein*ProteinA^1;
  Degradation_ProteinB: ProteinB => ; k_deg_protein*ProteinB^1;
end
