// SBML level 2 version 4
// Li-Ion Battery Discharge Model (SBML Level 2 Version 4)
//   Using only mass-action kinetics (no custom rate expressions)
//   - SoC: state of charge of the battery (0 to 1 scale)
//   - Discharge: SoC + Current -> ∅  at rate k_discharge
//   - Recharge: Charge + Electrons -> SoC at rate k_recharge
//   Units:
//   - hour = 3600 s
//   - per_hour = 1/hour

model LiIonBattery_MassAction_PowerForm()

  // Compartments:
  compartment cell = 1;

  // Species:
  species SoC in cell = 1/cell;
  species Current in cell = 1/cell;
  species Charge in cell = 1/cell;
  species Electrons in cell = 1/cell;

  // Parameters:
  k_discharge = 0.2 per_hour;
  k_recharge = 0.05 per_hour;

  // Reactions:
  Discharge: SoC + Current => ; k_discharge*SoC^1*Current^1;
  Recharge: Charge + Electrons => SoC; k_recharge*Charge^1*Electrons^1;

  // Unit definitions:
  unit hour = 3600 second;
  unit per_hour = 1 / (2.777778e-4 second);
end
