// SBML level 2 version 4
// <reaction id="PreyGrowth" reversibile="true">
//         <listOfReactants>
//           <speciesReference species="Prey" stoichiometry="1"/>
//         </listOfReactants>
//         <listOfProducts>
//           <speciesReference species="Prey" stoichiometry="2"/>
//         </listOfProducts>
//         <kineticLaw>
//           <math xmlns="http://www.w3.org/1998/Math/MathML">
//             <apply>
//               <minus/>
//               <apply>
//                 <times/>
//                 <ci>alpha</ci>
//                 <apply>
//                   <power/>
//                   <ci>Prey</ci>
//                   <cn type="real">1</cn>
//                 </apply>
//               </apply>
//               <apply>
//                 <times/>
//                 <ci>delta</ci>
//                 <apply>
//                   <power/>
//                   <ci>Prey</ci>
//                   <cn type="real">2</cn>
//                 </apply>
//               </apply>
//             </apply>
//           </math>
//         </kineticLaw>
//       </reaction>

model LotkaVolterra()

  // Compartments:
  compartment cell = 1;

  // Species:
  substanceOnly species Prey in cell = 10;  // substance in item
  substanceOnly species Predator in cell = 2;  // substance in item

  // Parameters:
  alpha = 2 per_second;
  beta = 0.001 per_item_day;
  gamma = 0.001 per_day;
  delta = 1 per_day;
  time_delay = 0.1 per_day;

  // Reactions:
  PreyGrowth: Prey => 2 Prey; alpha*Prey^1;

  // Events:
  IncreasePreyGrowth: at (time > 0.1), fromTrigger=false: Prey = 2;

  // Unit definitions:
  unit per_day = 86400 second;
  unit per_item_day = 1 / (item * 86400 second);
end
