// SBML level 2 version 4

model SIR()

  // Compartments:
  compartment cell = 1;

  // Species:
  species Susceptible in cell = 20/cell;  // substance in item
  species Infected in cell = 12/cell;  // substance in item
  species Recovered in cell = 3/cell;  // substance in item

  // Parameters:
  beta = 0.01 per_item_day;
  gamma = 0.2 per_day;
  time_delay = 0.1 per_day;

  // Reactions:
  infection: Susceptible + Infected => 2 Infected; beta*Susceptible^1*Infected^1;
  recovery: Infected => Recovered; gamma*Infected^1;

  // Events:
  vaccination: at (Infected > 10): Susceptible = Susceptible - 5, Recovered = Recovered + 5;

  // Unit definitions:
  unit per_day = 86400 second;
  unit per_item_day = 1 / (item * 86400 second);
end
