// SBML level 2 version 4

model LotkaVolterra()

  // Compartments:
  compartment cell = 1;

  // Species:
  species Prey in cell = 20/cell;  // substance in item
  species Predator in cell = 3/cell;  // substance in item

  // Parameters:
  beta = 0.01 per_item_day;
  gamma = 0.2 per_day;
  time_delay = 0.1 per_day;

  // Reactions:
  PreyGrowth: 2 Prey => 3 Prey; alpha*Prey^2;
  Predation: Prey + 2 Predator => 3 Predator; beta*Prey^1*Predator^2;
  PredatorDeath: Predator => ; gamma*Predator^1;

  // Events:
  AddPrey: at (time_delay) after (Prey < 10), fromTrigger=false: Prey = 50, Predator = 2;
  RemovePredator: at (Prey > 20), fromTrigger=false: Predator = 5;

  // Unit definitions:
  unit per_day = 86400 second;
  unit per_item_day = 1 / (item * 86400 second);
end
