// SBML level 2 version 4

model LotkaVolterra()

  // Compartments:
  compartment cell = 1;

  // Species:
  substanceOnly species Prey in cell = 20;  // substance in item
  substanceOnly species Predator in cell = 6;  // substance in item

  // Parameters:
  alpha = 0.004 per_day;
  beta = 0.01 per_item_day;
  gamma = 0.8 per_day;
  time_delay = 0.1 per_day;

  // Reactions:
  PreyGrowth: 2 Prey => 3 Prey; alpha*Prey^2;
  Predation: Prey + 2 Predator => 3 Predator; beta*Prey^1*Predator^2;
  PredatorDeath: Predator => ; gamma*Predator^1;

  // Events:
  hunting: at (Predator > 15): gamma = 5;
  noHunting: at (Predator < 7): gamma = 0.001;

  // Unit definitions:
  unit per_day = 86400 second;
  unit per_item_day = 1 / (item * 86400 second);
end
